<?xml version="1.0"?>
<!--
  JSBSim 飞行动力学模型 - AIM-120C-5 AMRAAM (基于社区模型的修正尝试)

  模型概述
  本模型旨在针对现役 AIM-120C-5 主动雷达制导空空导弹，提供一个经过修正与补全的飞行动力学仿真描述
  工作主要集中于对现有社区开源模型进行数据复核与参数校准，试图在有限公开资料的范围内，尽可能还原该型导弹的基本物理响应特性

  相较于早期版本，本版本针对发现的部分参数偏差与定义冲突进行了调整
  通过闭环仿真对比，调整后的模型在关键能量管理指标上，与目前流传较广的第三方评估区间表现出了一定的吻合度
  模型集成了已知的几何参数（全长 3.655 米，直径 178 毫米）、标称发射质量（155 公斤），并参考了有关缩短控制舵机舱段（SCAS）以容纳改进型发动机的文献描述
  诚然，受限于公开数据的完备性，模型仍存在简化与推测成分，仅供非商业性研究与技术交流使用

  模型校准与数据来源说明
  [1] 气动模型方面的调整 (参考 DCS CFD 相关讨论)
      发现的冲突点：
          在检查原始模型时注意到，部分力系数函数内部预先乘入了参考面积
          考虑到 JSBSim 解算器在运行时会自动处理动压与参考面积的乘积，该设定可能导致气动载荷的重复计算
      调整尝试：
          移除了气动力系数定义中多余的几何属性乘积
          对升力、阻力及侧力系数进行了重新标定，试图使其斜率更贴近常规细长体布局的预期趋势
          阻力特性方面，尝试还原了跨音速区间（M0.8~M1.2）的激波阻力表现及高空零升阻力特征
      初步观察：
          上述调整后，仿真中的发射后能量衰减曲线有所延后，其变化幅度与部分社区讨论中提及的 CFD 修正趋势（射程变化约 10-20%）存在一定的相似性

  [2] 推进系统参数的重新推算
      基于可获得的 AIM-120C-5 性能描述资料，对动力系统参数进行了反向推导与核对：
          推进剂质量：
              综合多个交叉来源，暂定为 51 公斤（112.4 磅），以体现 C-5 型号发动机的改进方向
          质量流率：
              在约 7.75 秒的燃烧区间内，平均流率取值约为 14.5 磅/秒
          推力估算：
              基于约 265 秒比冲的设定，估算总冲对应的平均推力水平，其数值与部分 DCS 社区的第三方评估范围较为接近
          推力曲线：
              保留了典型的减面燃烧推力衰减趋势，以近似 HTPB 推进剂的常规特性

  [3] 飞控增益的适应性微调
      调整动机：
          鉴于气动效率参数发生变化后，原始 PID 增益使得闭环响应出现了一定程度的迟滞
      调整内容：
          对俯仰/偏航过载控制回路（Pitch_Nz_PID / Yaw_Ny_PID）的增益进行了幅度缩减（约为原值的 1/10），以期匹配校准后的升力效率
          未改动基于动压的增益调度逻辑框架
      响应表现：
          调整后的系统在应对极限过载指令时，动态响应趋于平稳，未观察到明显的超调或持续振荡，能够支持 40G 极限过载的机动假设

  [4] 其他建模细节
      架构模拟：
          参考了三回路自动驾驶仪的控制逻辑
      执行机构：
          考虑了舵面响应的有限速率（时间常数约 0.008 秒）与位置限制（±25°）
      静稳定性：
          设定为静不稳定布局（Cmα = +0.25），依赖飞控回路维持姿态
      阻尼项：
          保留了俯仰、偏航及滚转方向的阻尼力矩导数

  闭环仿真状态记录
      测试条件：
          海拔 10,000 m，马赫数 0.8 水平发射，中制导准备阶段施加 5g 过载指令
      主动段结束时刻（约 7.75 s）：
          仿真结果显示，此时弹体高度上升至 11,500 m 以上，马赫数约 3.95，剩余燃料质量低于1磅
      滑翔段趋势：
          在重力补偿逻辑下，弹道顶点可进一步延伸，最大射程表现落在公开文献提及的 100-110 km 区间附近
      过载响应：
          对 10g 阶跃指令的跟踪较为迅速，波形收敛良好

  本模型是基于公开碎片信息与社区讨论所做的一次修正尝试
  虽然在物理参数自洽性和动态趋势上较之前版本有所优化，但在真实的工程复杂性面前，仍不免存在诸多简化与疏漏
  欢迎各位开发者指正其中的不合理之处，以便后续进一步完善
-->
<fdm_config name="AIM-120C-5 AMRAAM (Final)" version="2.0">

  <!-- 物理参数 (Metrics) -->
  <metrics>
    <wingarea  unit="FT2">  1.292  </wingarea>
    <wingspan  unit="FT">  1.583  </wingspan>
    <chord     unit="FT">  0.816  </chord>
    <length    unit="FT">  12.0   </length>
    <diameter  unit="FT">  0.583  </diameter>

    <location name="AERORP" unit="IN">
      <x> 68.0 </x> <y>  0   </y> <z>  0   </z>
    </location>
    <location name="EYEPOINT" unit="IN">
      <x>  0   </x> <y>  0   </y> <z>  0   </z>
    </location>
    <location name="VRP" unit="IN">
      <x> 68.0 </x> <y>  0   </y> <z>  0   </z>
    </location>
  </metrics>

  <!-- 质量与惯性 (Mass Balance) -->
  <mass_balance>
    <emptywt unit="LBS">  243.0   </emptywt>
    <ixx unit="SLUG*FT2">   0.55  </ixx>
    <iyy unit="SLUG*FT2"> 168.0   </iyy>
    <izz unit="SLUG*FT2"> 168.0   </izz>
    <ixy unit="SLUG*FT2">   0.0   </ixy>
    <ixz unit="SLUG*FT2">   0.0   </ixz>
    <iyz unit="SLUG*FT2">   0.0   </iyz>

    <location name="CG" unit="IN">
      <x> 68.0 </x> <y>  0   </y> <z>  0   </z>
    </location>
  </mass_balance>

  <ground_reactions>
    <contact type="BOGEY" name="NOSE">
      <location unit="IN">
        <x> 20.0 </x> <y>  0   </y> <z> -6.0 </z>
      </location>
    </contact>
    <contact type="BOGEY" name="TAIL">
      <location unit="IN">
        <x> 120.0 </x> <y>  0   </y> <z> -6.0 </z>
      </location>
    </contact>
  </ground_reactions>

  <!-- ================= 动力系统 (Propulsion) ================= -->
  <propulsion>
    <engine>
      <rocket_engine name="AIM120C_AllBoost_Motor">
        <!-- 回归HTPB推进剂的典型比冲 -->
        <isp> 265.0 </isp>
        <minthrottle> 1.0 </minthrottle>
        <maxthrottle> 1.0 </maxthrottle>
        <!-- 推力建立时间 -->
        <builduptime> 0.15 </builduptime>

        <!-- 基于物理模型推导的推力表，平滑衰减 -->
        <thrust_table name="propulsion/thrust_prop_remain" type="internal">
          <tableData>
            <!-- 已消耗燃料 (lbs) | 推力 (lbf) -->
            0.0               3768.0   <!-- 初始峰值推力 -->
            100.0             3768.0   <!-- 平稳燃烧段 -->
            108.0             3500.0   <!-- 推力开始衰减 -->
            111.0             2500.0   <!-- 推力快速下降 -->
            113.0                0.0   <!-- 完全耗尽 -->
          </tableData>
        </thrust_table>

        <!-- 燃料流率: 51 kg / 7.75 s ≈ 14.5 lbs/s -->
        <fuelflow> 14.5 </fuelflow>
      </rocket_engine>

      <feed>0</feed>

      <thruster>
        <nozzle name="AIM120C_Nozzle">
          <area unit="FT2"> 0.1218 </area>
          <pe unit="PSF">   2116.22 </pe>
        </nozzle>
        <location unit="IN">
          <x> 143.0 </x> <y>   0   </y> <z>   0   </z>
        </location>
        <orient unit="DEG">
          <roll>  0 </roll> <pitch> 0 </pitch> <yaw>   0 </yaw>
        </orient>
      </thruster>
    </engine>

    <tank type="FUEL" number="0">
      <location unit="IN">
        <x> 115.0 </x> <y>   0   </y> <z>   0   </z>
      </location>
      <!-- 燃料质量 51 kg ≈ 112.4 lbs (基于评估报告) -->
      <capacity unit="LBS"> 112.4 </capacity>
      <contents unit="LBS"> 112.4 </contents>
    </tank>
  </propulsion>

  <!-- ================================================ -->
  <!-- 飞行控制系统 (Flight Control) - 增益已适配校准气动 -->
  <!-- ================================================ -->
  <flight_control name="AIM-120C-5_3-Loop_Autopilot">
    <property value="0.0">fcs/zero</property>
    <property>fcs/nz-cmd-norm</property>
    <property>fcs/ny-cmd-norm</property>
    <property>fcs/phi-cmd-rad</property>
    <property>fcs/elevator-pos-rad</property>
    <property>fcs/rudder-pos-rad</property>
    <property>fcs/aileron-pos-rad</property>
    <!-- 全局单位转换：将过载指令从 g 转换为 ft/s² -->
    <property value="32.174">fcs/g-ft_s2</property>
    <property>fcs/nz-cmd-ft_s2</property>
    <property>fcs/ny-cmd-ft_s2</property>

    <sensor name="Nz_Cmd_Unit_Convert">
      <input>fcs/nz-cmd-norm</input>
      <lag>0</lag>
      <gain>32.174</gain>
      <output>fcs/nz-cmd-ft_s2</output>
    </sensor>

    <sensor name="Ny_Cmd_Unit_Convert">
      <input>fcs/ny-cmd-norm</input>
      <lag>0</lag>
      <gain>32.174</gain>
      <output>fcs/ny-cmd-ft_s2</output>
    </sensor>

    <!-- ================================================ -->
    <!-- 俯仰通道 (Pitch Channel) - PID增益缩小为1/10     -->
    <!-- ================================================ -->
    <channel name="Pitch">
      <summer name="Pitch_Nz_Error">
        <input>fcs/nz-cmd-ft_s2</input>
        <input>-accelerations/Nz</input>
        <clipto>
          <min>-1287.0</min>   <!-- 40g(英国皇家空军报告) × 32.174 -->
          <max> 1287.0</max>
        </clipto>
        <output>fcs/pitch/nz-error</output>
      </summer>

      <pid name="Pitch_Nz_PID">
        <input>fcs/pitch/nz-error</input>
        <kp scheduled="true">
          0.045   <!-- 原0.45缩小10倍 -->
          <table>
            <independentVar>aero/qbar-psf</independentVar>
            <tableData>
                500.0   0.063
               1000.0   0.0585
               2000.0   0.0518
               3000.0   0.045
               5000.0   0.036
               8000.0   0.027
              12000.0   0.0203
            </tableData>
          </table>
        </kp>
        <ki scheduled="true">
          0.0015  <!-- 原0.015缩小10倍 -->
          <table>
            <independentVar>aero/qbar-psf</independentVar>
            <tableData>
                500.0   0.0021
               1000.0   0.0020
               2000.0   0.0017
               3000.0   0.0015
               5000.0   0.0012
               8000.0   0.0009
              12000.0   0.0007
            </tableData>
          </table>
        </ki>
        <kd scheduled="true">
          0.0005  <!-- 原0.005缩小10倍 -->
          <table>
            <independentVar>aero/qbar-psf</independentVar>
            <tableData>
                500.0   0.0007
               1000.0   0.0007
               2000.0   0.0006
               3000.0   0.0005
               5000.0   0.0004
               8000.0   0.0003
              12000.0   0.0002
            </tableData>
          </table>
        </kd>
        <clipto><min>-1.0</min><max>1.0</max></clipto>
        <output>fcs/pitch/pitch-rate-cmd</output>
      </pid>

      <summer name="Pitch_Rate_Error">
        <input>fcs/pitch/pitch-rate-cmd</input>
        <input>-velocities/q-aero-rad_sec</input>
        <clipto>
          <min>-2.0</min>
          <max> 2.0</max>
        </clipto>
        <output>fcs/pitch/rate-error</output>
      </summer>

      <pid name="Pitch_Rate_PID">
        <input>fcs/pitch/rate-error</input>
        <!-- 角速率内回路增益保持不变 -->
        <kp> 0.80 </kp> <ki> 0.02 </ki> <kd> 0.002 </kd>
        <clipto><min>-1.0</min><max>1.0</max></clipto>
        <output>fcs/elevator-cmd-norm</output>
      </pid>

      <kinematic name="Elevator_Actuator">
        <input>fcs/elevator-cmd-norm</input>
        <traverse>
          <setting><position>-1.0</position><time>0.004</time></setting>
          <setting><position> 1.0</position><time>0.004</time></setting>
        </traverse>
        <output>fcs/elevator-pos-norm</output>
      </kinematic>

      <aerosurface_scale name="Elevator_Command">
        <input>fcs/elevator-pos-norm</input>
        <range><min>-0.436</min><max>0.436</max></range>
        <output>fcs/elevator-pos-rad</output>
      </aerosurface_scale>
    </channel>

    <!-- ================================================ -->
    <!-- 偏航通道 (Yaw Channel) - PID增益缩小为1/10       -->
    <!-- ================================================ -->
    <channel name="Yaw">
      <summer name="Yaw_Ny_Error">
        <input>fcs/ny-cmd-ft_s2</input>
        <input>-accelerations/Ny</input>
        <clipto>
          <min>-1287.0</min>
          <max> 1287.0</max>
        </clipto>
        <output>fcs/yaw/ny-error</output>
      </summer>

      <pid name="Yaw_Ny_PID">
        <input>fcs/yaw/ny-error</input>
        <kp scheduled="true">
          0.045   <!-- 原0.45缩小10倍 -->
          <table>
            <independentVar>aero/qbar-psf</independentVar>
            <tableData>
                500.0   0.063   1000.0   0.0585   2000.0   0.0518
                3000.0   0.045   5000.0   0.036   8000.0   0.027  12000.0   0.0203
            </tableData>
          </table>
        </kp>
        <ki scheduled="true">
          0.0015  <!-- 原0.015缩小10倍 -->
          <table>
            <independentVar>aero/qbar-psf</independentVar>
            <tableData>
                500.0   0.0021   1000.0   0.0020   2000.0   0.0017
                3000.0   0.0015   5000.0   0.0012   8000.0   0.0009  12000.0   0.0007
            </tableData>
          </table>
        </ki>
        <kd scheduled="true">
          0.0005  <!-- 原0.005缩小10倍 -->
          <table>
            <independentVar>aero/qbar-psf</independentVar>
            <tableData>
                500.0   0.0007   1000.0   0.0007   2000.0   0.0006
                3000.0   0.0005   5000.0   0.0004   8000.0   0.0003  12000.0   0.0002
            </tableData>
          </table>
        </kd>
        <clipto><min>-1.0</min><max>1.0</max></clipto>
        <output>fcs/yaw/yaw-rate-cmd</output>
      </pid>

      <summer name="Yaw_Rate_Error">
        <input>fcs/yaw/yaw-rate-cmd</input>
        <input>-velocities/r-aero-rad_sec</input>
        <clipto><min>-2.0</min><max> 2.0</max></clipto>
        <output>fcs/yaw/rate-error</output>
      </summer>

      <pid name="Yaw_Rate_PID">
        <input>fcs/yaw/rate-error</input>
        <kp> 0.80 </kp> <ki> 0.02 </ki> <kd> 0.002 </kd>
        <clipto><min>-1.0</min><max>1.0</max></clipto>
        <output>fcs/rudder-cmd-norm</output>
      </pid>

      <kinematic name="Rudder_Actuator">
        <input>fcs/rudder-cmd-norm</input>
        <traverse>
          <setting><position>-1.0</position><time>0.01</time></setting>
          <setting><position> 1.0</position><time>0.01</time></setting>
        </traverse>
        <output>fcs/rudder-pos-norm</output>
      </kinematic>

      <aerosurface_scale name="Rudder_Command">
        <input>fcs/rudder-pos-norm</input>
        <range><min>-0.436</min><max>0.436</max></range>
        <output>fcs/rudder-pos-rad</output>
      </aerosurface_scale>
    </channel>

    <!-- ================================================ -->
    <!-- 滚转通道 (Roll Channel) - 增益保持不变           -->
    <!-- ================================================ -->
    <channel name="Roll">
      <summer name="Roll_Phi_Error">
        <input>fcs/phi-cmd-rad</input>
        <input>-attitude/phi-rad</input>
        <clipto><min>-3.14</min><max> 3.14</max></clipto>
        <output>fcs/roll/phi-error</output>
      </summer>

      <pid name="Roll_Phi_PID">
        <input>fcs/roll/phi-error</input>
        <kp scheduled="true">
          0.80
          <table>
            <independentVar>aero/qbar-psf</independentVar>
            <tableData>
                500.0   1.200   1000.0   1.080   2000.0   0.920
                3000.0   0.800   5000.0   0.560   8000.0   0.400  12000.0   0.280
            </tableData>
          </table>
        </kp>
        <ki scheduled="true">
          0.03
          <table>
            <independentVar>aero/qbar-psf</independentVar>
            <tableData>
                500.0   0.045   1000.0   0.041   2000.0   0.035
                3000.0   0.030   5000.0   0.021   8000.0   0.015  12000.0   0.011
            </tableData>
          </table>
        </ki>
        <kd scheduled="true">
          0.008
          <table>
            <independentVar>aero/qbar-psf</independentVar>
            <tableData>
                500.0   0.012   1000.0   0.011   2000.0   0.009
                3000.0   0.008   5000.0   0.006   8000.0   0.004  12000.0   0.003
            </tableData>
          </table>
        </kd>
        <clipto><min>-1.0</min><max>1.0</max></clipto>
        <output>fcs/roll/roll-rate-cmd</output>
      </pid>

      <summer name="Roll_Rate_Error">
        <input>fcs/roll/roll-rate-cmd</input>
        <input>-velocities/p-aero-rad_sec</input>
        <clipto><min>-2.0</min><max> 2.0</max></clipto>
        <output>fcs/roll/rate-error</output>
      </summer>

      <pid name="Roll_Rate_PID">
        <input>fcs/roll/rate-error</input>
        <kp> 0.60 </kp> <ki> 0.01 </ki> <kd> 0.001 </kd>
        <clipto><min>-1.0</min><max>1.0</max></clipto>
        <output>fcs/aileron-cmd-norm</output>
      </pid>

      <kinematic name="Aileron_Actuator">
        <input>fcs/aileron-cmd-norm</input>
        <traverse>
          <setting><position>-1.0</position><time>0.004</time></setting>
          <setting><position> 1.0</position><time>0.004</time></setting>
        </traverse>
        <output>fcs/aileron-pos-norm</output>
      </kinematic>

      <aerosurface_scale name="Aileron_Command">
        <input>fcs/aileron-pos-norm</input>
        <range><min>-0.436</min><max>0.436</max></range>
        <output>fcs/aileron-pos-rad</output>
      </aerosurface_scale>
    </channel>
  </flight_control>

  <!-- ================================================ -->
  <!-- 气动模型 (Aerodynamics) - 已校准，系数返回纯值   -->
  <!-- ================================================ -->
  <aerodynamics>
    <axis name="LIFT">
      <function name="aero/coefficient/CLalpha">
        <description>法向力系数 (CNα) - 已校准</description>
        <table>
          <independentVar lookup="row">aero/alpha-rad</independentVar>
          <independentVar lookup="column">velocities/mach</independentVar>
          <tableData>
                  0.3    0.5    0.8    1.0    1.2    1.5    2.0    2.5    3.0    3.5    4.0
            -0.50 -8.50  -9.00  -8.20  -7.50  -7.00  -6.50  -6.00  -5.80  -5.50  -5.30  -5.00
            -0.30 -5.10  -5.40  -4.92  -4.50  -4.20  -3.90  -3.60  -3.48  -3.30  -3.18  -3.00
            -0.20 -3.40  -3.60  -3.28  -3.00  -2.80  -2.60  -2.40  -2.32  -2.20  -2.12  -2.00
            -0.10 -1.70  -1.80  -1.64  -1.50  -1.40  -1.30  -1.20  -1.16  -1.10  -1.06  -1.00
             0.00  0.00   0.00   0.00   0.00   0.00   0.00   0.00   0.00   0.00   0.00   0.00
             0.10  1.70   1.80   1.64   1.50   1.40   1.30   1.20   1.16   1.10   1.06   1.00
             0.20  3.40   3.60   3.28   3.00   2.80   2.60   2.40   2.32   2.20   2.12   2.00
             0.30  5.10   5.40   4.92   4.50   4.20   3.90   3.60   3.48   3.30   3.18   3.00
             0.40  6.80   7.20   6.56   6.00   5.60   5.20   4.80   4.64   4.40   4.24   4.00
             0.50  8.50   9.00   8.20   7.50   7.00   6.50   6.00   5.80   5.50   5.30   5.00
          </tableData>
        </table>
      </function>

      <function name="aero/coefficient/CLde">
        <description>舵面升力系数 (CLδe) - 已校准</description>
        <product>
          <property>fcs/elevator-pos-rad</property>
          <table>
            <independentVar lookup="row">velocities/mach</independentVar>
            <tableData>
              0.2   2.0
              0.4   2.2
              0.6   2.4
              0.8   2.8
              1.0   3.0
              1.2   2.8
              1.5   2.4
              2.0   2.2
              3.0   2.0
              4.0   1.8
            </tableData>
          </table>
        </product>
      </function>
    </axis>

    <axis name="DRAG">
      <function name="aero/coefficient/CD0">
        <description>零升阻力系数 (CD0) - 已校准，峰值约0.45</description>
        <table>
          <independentVar lookup="row">velocities/mach</independentVar>
          <tableData>
            0.0   0.25
            0.2   0.25
            0.4   0.26
            0.6   0.28
            0.7   0.30
            0.8   0.33
            0.9   0.38
            0.95  0.42
            1.0   0.45
            1.05  0.40
            1.1   0.36
            1.2   0.31
            1.3   0.27
            1.4   0.24
            1.5   0.21
            1.6   0.19
            1.8   0.17
            2.0   0.15
            2.5   0.13
            3.0   0.11
            3.5   0.10
            4.0   0.09
          </tableData>
        </table>
      </function>

      <function name="aero/coefficient/CDi">
        <description>诱导阻力系数 (CDi)</description>
        <product>
          <property>aero/alpha-rad</property>
          <property>aero/alpha-rad</property>
          <value>0.18</value>
        </product>
      </function>

      <function name="aero/coefficient/CDde">
        <description>舵面阻力增量 (CDδe)</description>
        <product>
          <property>fcs/elevator-pos-rad</property>
          <property>fcs/elevator-pos-rad</property>
          <value>0.25</value>
        </product>
      </function>
    </axis>

    <axis name="SIDE">
      <function name="aero/coefficient/CYb">
        <description>侧力系数 (CYβ) - 已校准</description>
        <product>
          <property>aero/beta-rad</property>
          <table>
            <independentVar lookup="row">velocities/mach</independentVar>
            <tableData>
              0.3  -18.0
              0.5  -19.2
              0.8  -20.4
              1.0  -19.2
              1.2  -18.0
              1.5  -15.6
              2.0  -14.4
              3.0  -12.0
              4.0  -10.8
            </tableData>
          </table>
        </product>
      </function>
    </axis>

    <axis name="PITCH">
      <function name="aero/coefficient/Cmde">
        <description>舵面俯仰力矩系数 (Cmδe)</description>
        <product>
          <property>fcs/elevator-pos-rad</property>
          <table>
            <independentVar lookup="row">velocities/mach</independentVar>
            <tableData>
              0.2   5.0
              0.4   5.5
              0.6   6.0
              0.8   6.8
              1.0   7.2
              1.2   7.0
              1.5   6.5
              2.0   6.0
              3.0   5.5
              4.0   5.0
            </tableData>
          </table>
        </product>
      </function>

      <function name="aero/coefficient/Cmalpha">
        <description>静稳定力矩系数 (Cmα)</description>
        <product>
          <property>aero/alpha-rad</property>
          <value>0.25</value>
        </product>
      </function>

      <function name="aero/coefficient/Cmq">
        <description>俯仰阻尼力矩系数 (Cmq)</description>
        <product>
          <property>velocities/q-aero-rad_sec</property>
          <value>-20.0</value>
        </product>
      </function>
    </axis>

    <axis name="YAW">
      <function name="aero/coefficient/Cndr">
        <description>舵面偏航力矩系数 (Cnδr)</description>
        <product>
          <property>fcs/rudder-pos-rad</property>
          <value>-6.5</value>
        </product>
      </function>

      <function name="aero/coefficient/Cnr">
        <description>偏航阻尼力矩系数 (Cnr)</description>
        <product>
          <property>velocities/r-aero-rad_sec</property>
          <value>-15.0</value>
        </product>
      </function>
    </axis>

    <axis name="ROLL">
      <function name="aero/coefficient/Clda">
        <description>舵面滚转力矩系数 (Clδa)</description>
        <product>
          <property>fcs/aileron-pos-rad</property>
          <value>-10.0</value>
        </product>
      </function>

      <function name="aero/coefficient/Clp">
        <description>滚转阻尼力矩系数 (Clp)</description>
        <product>
          <property>velocities/p-aero-rad_sec</property>
          <value>-30.0</value>
        </product>
      </function>
    </axis>
  </aerodynamics>
</fdm_config>
